! TUNNEL_V2_HDWATTR


*if,GEO_HDW1_LEFT_wallHeight,eq,0,then
  GEO_HDW1_LEFT_wallHeight  = GEO_TUN_effH+GEO_FRAME_headBeamHeight+GEO_HDW1_LEFT_footDepth
*endif

*if,GEO_HDW1_RIGHT_wallHeight,eq,0,then
  GEO_HDW1_RIGHT_wallHeight = GEO_TUN_effH+GEO_FRAME_headBeamHeight+GEO_HDW1_RIGHT_footDepth
*endif

*if,GEO_HDW2_LEFT_wallHeight ,eq,0,then
  GEO_HDW2_LEFT_wallHeight  = GEO_TUN_effH+GEO_FRAME_headBeamHeight+GEO_HDW2_LEFT_footDepth
*endif

*if,GEO_HDW2_RIGHT_wallHeight,eq,0,then
  GEO_HDW2_RIGHT_wallHeight = GEO_TUN_effH+GEO_FRAME_headBeamHeight+GEO_HDW2_RIGHT_footDepth
*endif

*do,nthHdw,1,2,1
  *if,GEO_HDW%nthHdw%_status,eq,1,then
    *if,GEO_HDW%nthHdw%_type,ne,2,then
      afunbackup
      *afun,deg
      leftDeltaX  = GEO_HDW%nthHdw%_LEFT_wallLength*sin(GEO_HDW%nthHdw%_LEFT_wallAngle)
      rightDeltaX = GEO_HDW%nthHdw%_RIGHT_wallLength*sin(GEO_HDW%nthHdw%_RIGHT_wallAngle)
      leftDeltaZ  = GEO_HDW%nthHdw%_LEFT_wallLength*cos(GEO_HDW%nthHdw%_LEFT_wallAngle)
      rightDeltaZ = GEO_HDW%nthHdw%_RIGHT_wallLength*cos(GEO_HDW%nthHdw%_RIGHT_wallAngle)
      afunrestore

      *if,nthHdw,eq,1,then
        zLeft  = 0
        zRight = GEO_RWALL_zBeg
      *else
        zLeft  = GEO_TUN_length
        zRight = GEO_RWALL_zEnd
      *endif

      zDelta      = (zLeft+leftDeltaZ)-(zRight+rightDeltaZ)
      xToCenter   = leftDeltaX+(GEO_TUN_totEffW/2)
      xToEnd      = leftDeltaX+rightDeltaX+GEO_TUN_totEffW
      xRatio      = xToCenter/xToEnd
      skewDeltaZ  = zLeft-zRight
      skewCenterZ = zLeft+(skewDeltaZ*xRatio)

      GEO_HDW%nthHdw%_slabLength = (zLeft+leftDeltaZ)-(zDelta*xRatio)-skewCenterZ
    *endif
  *endif
*enddo

GEO_HDW1_LEFT_cornerRadius  = 2*GEO_HDW1_LEFT_wallThk
GEO_HDW1_RIGHT_cornerRadius = 2*GEO_HDW1_RIGHT_wallThk
GEO_HDW2_LEFT_cornerRadius  = 2*GEO_HDW2_LEFT_wallThk
GEO_HDW2_RIGHT_cornerRadius = 2*GEO_HDW2_RIGHT_wallThk

GEO_HDW1_LEFT_xSign  =  1
GEO_HDW1_RIGHT_xSign = -1
GEO_HDW2_LEFT_xSign  =  1
GEO_HDW2_RIGHT_xSign = -1

/prep7

! Inlet sections
*do,nthInlet,1,2,1

  *if,GEO_HDW%nthInlet%_slabStfThk,eq,0,then
    GEO_HDW%nthInlet%_slabStfThk = GEO_HDW%nthInlet%_slabThk
  *endif

  TUNNEL_V2_CONCSEC , SEC_HDW%nthInlet%_LEFT_wall  , GEO_HDW%nthInlet%_LEFT_wallThk  , 'I%nthInlet%LWALL'
  TUNNEL_V2_CONCSEC , SEC_HDW%nthInlet%_RIGHT_wall , GEO_HDW%nthInlet%_RIGHT_wallThk , 'I%nthInlet%RWALL'

  TUNNEL_V2_CONCSEC , SEC_HDW%nthInlet%_LEFT_footing  , GEO_HDW%nthInlet%_LEFT_footThk  , 'I%nthInlet%LFOOT'
  TUNNEL_V2_CONCSEC , SEC_HDW%nthInlet%_RIGHT_footing , GEO_HDW%nthInlet%_RIGHT_footThk , 'I%nthInlet%RFOOT'

  TUNNEL_V2_CONCSEC , SEC_HDW%nthInlet%_slab      , GEO_HDW%nthInlet%_slabThk    , 'I%nthInlet%SLAB'
  TUNNEL_V2_CONCSEC , SEC_HDW%nthInlet%_stiffener , GEO_HDW%nthInlet%_slabStfThk , 'I%nthInlet%SSTF'
  TUNNEL_V2_CONCSEC , SEC_HDW%nthInlet%_frontBeam , GEO_HDW%nthInlet%_beamWidth  , 'I%nthInlet%FBEAM'
*enddo

! Frame sections
TUNNEL_V2_CONCSEC , SEC_FRAME_headBeam , GEO_FRAME_headBeamWidth , 'HBEAM'
TUNNEL_V2_CONCSEC , SEC_FRAME_backBeam , GEO_FRAME_backBeamWidth , 'BBEAM'
TUNNEL_V2_CONCSEC , SEC_FRAME_column   , GEO_FRAME_columnThk     , 'COLUMN'

! End cap sections
TUNNEL_V2_CONCSEC , SEC_endcap1 , GEO_ENDCAP1_thk , 'CAP1'
TUNNEL_V2_CONCSEC , SEC_endcap2 , GEO_ENDCAP2_thk , 'CAP2'
